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/batch
! ANSYS input file written by Workbench version 2020 R2
! File used for geometry attach: C:\Users\Varun\Documents\GitHub\The-Naked-Mile-Bot-69000\SolidWorks\Spring Arm.STEP
/title,unsaved_project--Static Structural (A5)
/com,--- Data in consistent MKS units. See Solving Units in the help system for more information.
/units,MKS
/prep7
! Turn off shape checking because checks already performed inside WB mesher.
! See help system for more information.
SHPP,OFF,,NOWARN
etcon,set             ! allow ANSYS to choose best KEYOP's for 180x elements
/com,*********** Nodes for the whole assembly ***********
nblock,3,,4266
(1i9,3e20.9e3)
        1    -6.260578649E-02     1.463230733E-02     2.250000000E-02
        2    -5.729319444E-02     1.320880258E-02     2.250000000E-02
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-1
/com,*********** Nodes for all Remote Points ***********
nblock,3
(1i9,3e20.9e3)
     3880     3.750000000E-02    -1.898938451E-03     4.500000000E-02
-1
/com,*********** Elements for Body 1 "Spring Arm-FreeParts|Boss-Extrude2" ***********
et,1,187
eblock,19,solid,,2047
(19i9)
        1        1        1        1        0        0        0        0       10        0        1      248      650      295      638     2206     2393     2203     2205
     3879     2392
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-1
/com,*********** Send User Defined Coordinate System(s) ***********
csys,0
toffst,273.15,  ! Temperature offset from absolute zero
/com,*********** Set Reference Temperature ***********
tref,22.
/com,*********** Send Materials ***********
Temperature = 'TEMP' ! Temperature
MP,DENS,1,7850,	! kg m^-3
MP,ALPX,1,1.2e-05,	! C^-1
MP,C,1,434,	! J kg^-1 C^-1
MP,KXX,1,60.5,	! W m^-1 C^-1
MP,RSVX,1,1.7e-07,	! kg m^3 A^-2 s^-3
MP,EX,1,200000000000,	! Pa
MP,NUXY,1,0.3,
MP,MURX,1,10000,

!************************* Model Summary ********************
!Spring Arm-FreeParts|Boss-Extrude2,	Structural Steel,	matid,	1
!************************* End Model Summary ********************
/com,*********** Fixed Supports ***********
CMBLOCK,_FIXEDSU,NODE,       35
(8i10)
        58        71        72       141       165       167       244       245
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cmsel,s,_FIXEDSU
d,all,all
nsel,all
/com,*********** Define Force Using Surface Effect Elements ***********
local,12,0,0.,0.,0.,0.,0.,0.
csys,0
et,2,154
eblock,10,,,8
(15i9)
     3111        2        2        2       12        1        3      265      265      651      667      265      654
     3112        2        2        2       12        2        3        4        4      658      665        4      659
     3113        2        2        2       12      266        1      265      265      655      654      265     2298
     3114        2        2        2       12      265        3        2        2      667      658        2      663
     3115        2        2        2       12        9       11       10       10      707      713       10      706
     3116        2        2        2       12       10       11       12       12      713      721       12      714
     3117        2        2        2       12        9       10      264      264      706      719      264      710
     3118        2        2        2       12       10      263      264      264      718     2293      264      719
-1
esel,s,type,,2
keyop,2,2,1                ! Apply load in local coordinate system
keyop,2,7,1                ! Use original area so load is constant in large deformation
keyop,2,11,2               ! Use real and not project area
esel,all
/com,*********** Create Remote Point "Internal Remote Point" ***********
! -------- Remote Point Used by "Moment" --------
*set,tid,4
*set,cid,3
et,cid,174
et,tid,170
keyo,tid,2,1               ! Don't fix the pilot node
keyo,tid,4,111111
keyo,cid,12,5              ! Bonded Contact
keyo,cid,4,1               ! Deformable RBE3 style load
keyo,cid,2,2               ! MPC style contact
eblock,10,,,16
(15i9)
     3119        3        3        3        0       19       17      303      303      761      765      303      780
     3120        3        3        3        0       20       19      303      303      777      780      303      787
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-1
*set,_npilot,3880
_npilot33=_npilot
type,tid
mat ,cid
real,cid
tshape,pilo
en,3135,_npilot
tshape
/com,*********** Construct Moment Using Remote Attachment ***********
fini
/com,****************************************************************************
/com,*************************    SOLUTION       ********************************
/com,****************************************************************************
/solu
antype,0                   ! static analysis
_thickRatio=  1     ! Ratio of thick parts in the model
eqsl,pcg,1e-8,,,,,,1
cntr,print,1               ! print out contact info and also make no initial contact an error
dmpoption,emat,no             ! Don't combine emat file for DANSYS
dmpoption,esav,no             ! Don't combine esav file for DANSYS
nldiag,cont,iter           ! print out contact info each equilibrium iteration
rescontrol,,none                 ! Do not keep any restart files
/com,****************************************************
/com,******************* SOLVE FOR LS 1 OF 1 ****************
esel,s,type,,2
nsle
sfe,all,1,pres,1,-32948.7680949478
sfe,all,2,pres,1,-122966.468975173
sfe,all,3,pres,1,0.
nsel,all
esel,all
nsel,s,node,,3880
f,all,mx,0.
f,all,my,0.
f,all,mz,-0.6
nsel,all
nsub,1,1,1
time,1.
outres,erase
outres,all,none
outres,nsol,all,
outres,rsol,all
outres,eangl,all
outres,etmp,all
outres,veng,all
outres,strs,all,
outres,epel,all,
outres,eppl,all,
outres,cont,all,
! *********** WB SOLVE COMMAND ***********
! check interactive state
*get,ANSINTER_,active,,int
*if,ANSINTER_,ne,0,then
/eof
*endif
solve
/com *************** Write FE CONNECTORS *********
CEWRITE,file,ce,,INTE
/com,****************************************************
/com,*************** FINISHED SOLVE FOR LS 1 *************
*get,_PCGITER,active,,solu,cgiter
/post1
fini
